# Образующие полиномы
x := 10  # Заданная входная последовательность и ошибки
p(x) := [1; 1 + x; 1 + x + x^2]  # Здесь указываем полиномы, которые будут использоваться в нашем кодеке
# Входная последовательность
M := [0, 0, 1, 1, 1, 1, 1, 1]
# [area: Кодек, кодер, и вспомогательные функции]
polys := p(x)
# Записываем полиномы в рабочий вектор
polyLength(in) :=
    i ← 0
    while in ≠ mod(in, x^i)
        i ← i + 1
    i - 1  # определяет старшую степень полинома
polyToVector(in) :=
    for i ∈ 0 .. polyLength(in)
        M[i] ← mod(floor(in/10^i), 10)
    M  # переводит полином в вектор
newState(inBit, currentState) := stack(inBit, submatrix(currentState, 0, last(currentState) - 1, 0, 0))  # Определяет новое состояние кодера
# Определяет максимальную старшую степень из всех полиномов. Это же номер последнего регистра (нумерация с 0)
regCount := max(vectorize(polyLength(polys)), 2) = 2
statesNum := 2^regCount = 4  # Определяет количество состояний кодера
hamm(arg1, arg2) := sum(vectorize(arg1 xor arg2))  # Определяет расстояние хемминга между двумя кодовыми последовательностями
null(i, j) := 0
polySum(pol, registers) :=
    for i ∈ 0 .. polyLength(pol)
        out ← out xor registers[i] if polyToVector(pol)[i] == 1  # Считает значение на выходе сумматора
num := length(polys) = 3  # Определяет количество полиномов
dec2bin(j) :=
    len ← regCount - 1
    for i ∈ 0 .. len
        out[len - i] ← mod(j, 2)
        j ← floor(j/2)
    reverse(out)
bin2dec(vect) :=
    vect ← reverse(vect)
    last ← last(vect)
    for i ∈ 0 .. last
        out ← out + vect[last - i]*2^i
# Функции перевода из десятичной системы счисления в двоичную и обратно
allStates :=
    n ← regCount
    for i ∈ 0 .. 2^n - 1
        F[i] ← dec2bin(i)
    F  # Генерирует матрицу всех возможных состояний
transpose(allStates) = [[0; 0], [1; 0], [0; 1], [1; 1]]
# Определяет значения на выходе всех сумматоров
codec(inBit, currentState) :=
    registers ← stack(inBit, currentState)
    flag ← -1
    for i ∈ 0 .. last(polys)
        currentSum ← polySum(polys[i], registers)
        if flag == -1
            outBit ← currentSum
            flag ← 0
        outBit ← stack(currentSum, outBit) otherwise
    outBit  # Значения регистров мы получаем складывая бит на входе кодера и состояние кодера
# Для каждого сумматора
# Значение на выходе сумматора
# Складываем значение на выходе текущего сумматора и значения на выходе остальных сумматоров
allOutBits :=
    out ← matrix(statesNum, 2, null)
    for j ∈ 0 .. last(allStates)
        for bit ∈ 0 .. 1
            out[j, bit] ← codec(bit, allStates[j])
    out
# Строит матрицу всех возможных бит на выходе кодека
transpose(allOutBits) = [[0; 0; 0], [1; 1; 0], [1; 0; 0], [0; 1; 0]; [1; 1; 1], [0; 0; 1], [0; 1; 1], [1; 0; 1]]
allNewStates :=
    out ← matrix(statesNum, 2, null)
    for j ∈ 0 .. last(allStates)
        for bit ∈ 0 .. 1
            out[j, bit] ← bin2dec(newState(bit, allStates[j]))
    out
# Строит матрицу всех возможных новых состояний кодера
transpose(allNewStates) = [0, 2, 0, 2; 1, 3, 1, 3]
coder(M) :=
    state ← 0
    for i ∈ 0 .. last(M)
        curr ← allOutBits[state, M[i]]
        state ← allNewStates[state, M[i]]
        for j ∈ 0 .. last(curr)
            out[i*num + j] ← curr[j]
    out  # Устанавливаем нулевое состояние
# Текущие биты на выходе кодера
# Новое состояние кодера
# Записываем биты на выходе кодера
out_coder := coder(transpose(M))
# На входе кодера
M = [0, 0, 1, 1, 1, 1, 1, 1]
# На выходе кодера
transpose(out_coder) = [0, 0, 0, 0, 0, 0, 1, 1, 1, 0, 0, 1, 1, 0, 1, 1, 0, 1, 1, 0, 1, 1, 0, 1]
# Вносим ошибки
errors := [0, 0, 0, 1, 0, 0, 1, 0, 0, 0, 0, 0, 0, 0, 0, 0, 0, 0, 0, 0, 0, 0, 0, 0]
# [area: Сложение по модулю 2]
in_decoder := vectorize(out_coder xor transpose(errors))
# Принятая последовательность
transpose(in_decoder) = [0, 0, 0, 1, 0, 0, 0, 1, 1, 0, 0, 1, 1, 0, 1, 1, 0, 1, 1, 0, 1, 1, 0, 1]
# [area: Декодер]
decode(in) :=
    states ← matrix(statesNum, length(in)/num, null)
    D ← matrix(statesNum, 1, null)
    nLast ← floor((last(in) - 1)/num)
    for N ∈ 0 .. nLast
        currBits ← submatrix(in, N*num, N*num + num - 1, 0, 0)
        newD ← matrix(statesNum, 1, null)
        for j ∈ 0 .. last(allStates)
            for bit ∈ 0 .. 1
                current ← allOutBits[j, bit]
                currD ← hamm(currBits, current) + D[j]
                state ← allNewStates[j, bit]
                if newD[state] == 0 or newD[state] ≥ currD
                    states[state, N] ← j
                    newD[state] ← currD
        D ← newD
    min ← match(min(newD), newD)[0]
    for i ∈ nLast .. 0
        decoded[i] ← allStates[min][0]
        min ← states[min, i]
    decoded  # Матрица предыдущих состояний
# Матрица весов путей
# Номер последнего элемента декодированной последовательности
# Считываем текущую пачку бит во входной последовательности (в зависимости от количества сумматоров)
# Матрица новых весов путей
# Достаём из матрицы возможных значений на выходе кодека наш вариант (состояние j и входной бит bit)
# Считаем новый вес пути
# Достаём из матрицы новых состояний новое состояние
# Если новый вес пути равен нулю (случай, когда мы только начали декодирование) или больше только что посчитанного (для предыдущего бита на входе), то записываем новое состояние и вес пути
# Ищем минимальный вес пути на последнем шаге
# Выводим декодированную последовательность
D := decode(in_decoder)
# Генерированные входная последовательность и ошибки
# На входе кодера
M = [0, 0, 1, 1, 1, 1, 1, 1]
# На выходе декодера
transpose(D) = [0, 0, 1, 1, 1, 1, 1, 1]
# Сложение по модулю 2
vectorize(M xor transpose(D)) = [0, 0, 0, 0, 0, 0, 0, 0]
L := 100000
n := 100
p := 0.7
perr := 0.25
# [area: Всякая всячина]
in := rbinom(L, 1, p)
err := rbinom(L*num, 1, perr)
pmn(A) :=
    nb ← floor(length(A)/n)
    M ← matrix(n, 1, null)
    for i ∈ 0 .. nb - 1
        m ← sum(submatrix(A, i*n, i*n + n - 1, 0, 0))
        M[m] ← M[m] + 1
    M/nb
coded :=
    nb ← L/n
    for i ∈ 0 .. nb - 1
        code ← coder(submatrix(in, i*n, i*n + n - 1, 0, 0))
        out ← code if out == 0
        out ← stack(out, code) otherwise
    out
indecoder := vectorize(coded xor err)
decoded :=
    nb ← L/n
    for i ∈ 0 .. nb - 1
        code ← decode(submatrix(indecoder, i*n*num, i*n*num + n*num - 1, 0, 0))
        out ← code if out == 0
        out ← stack(out, code) otherwise
    out
outerrs := vectorize(in xor decoded)
outerrsnum := sum(outerrs) = 19834
PMN := pmn(outerrs)
p := 0 .. n - 1
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